#weather get CA-San_Jose_Intl_Ap
#define WEATHER=CA-San_Jose_Intl_Ap.tmy3
#define NHOUSES_ELEC=70
#define NHOUSES_GAS=30
#define TIMEZONE=PST+8PDT
#define STARTTIME=2020-01-01 00:00:00 PST
#define STOPTIME=2021-01-01 00:00:00 PST
#define HEATINGSYSTEMTYPE=HEAT_PUMP
#define COOLINGSYSTEMTYPE=HEAT_PUMP
#define HEATINGSETPOINT=71
#define COOLINGSETPOINT=74
#define THERMALINTEGRITYLEVEL=GOOD
#define GASENDUSES=DRYER|WATERHEATER|RANGE
#define CURRDUMP=ENABLE
